// COMSOL Multiphysics 6.3.0.290 model "ChimHT.St1.mph"
// Outline of the model tree

Geometry
  geom1 "Geometry 1" (2D, length unit m)
    r1: Rectangle | size = {1, 1}; base = center
    r2: Rectangle | size = {.5, .5}; pos = {-.4, -.1}
    dif1: Difference | input = r1; input2 = r2
    fin: Finalize "Form Union"

Physics
  ht: HeatTransfer "Heat Transfer in Solids" on all domains
    dependent variable T
    solid1: SolidHeatTransferModel "Solid 1" (default)
      k_mat = userdef
      k = 1
      rho_mat = userdef
      rho = 2000
      Cp_mat = userdef
      Cp = 1000
    init1: init "Initial Values 1" (default)
    ins1: ThermalInsulation (default)
    temp1: TemperatureBoundary "Temperature 1" on boundaries 1 | T0 = 70[degC]
    hf1: HeatFluxBoundary "Heat Flux 1" on boundaries 3 | HeatFluxType = ConvectiveHeatFlux; h = 10; Text = 30[degC]
    hf2: HeatFluxBoundary "Heat Flux 2" on boundaries 8 | HeatFluxType = ConvectiveHeatFlux; h = 40; Text = 20[degC]
    hf3: HeatFluxBoundary "Heat Flux 3" on boundaries 2 | HeatFluxType = ConvectiveHeatFlux; h = 20; Text = 20[degC]
    temp2: TemperatureBoundary "Temperature 2" on boundaries 4-7 | T0 = 100[degC]

Mesh
  mesh1 "Mesh 1"
    size: MeshSizeDefault | hmax = 0.067; hmin = 3.0E-4; hcurve = 0.3; hgrad = 1.3
    bl1: BndLayer "Boundary Layers 1" on domains 1
      blp: BndLayerProp "Boundary Layer Properties" on no boundaries

Studies
  std1 "Study 1"
    stat: Stationary

Solver configurations
  sol1 "Solution 1" (study std1)
    v1: Variables "Dependent Variables 1"
    s1: Stationary "Stationary Solver 1"
      fc1: FullyCoupled
      d1: Direct "Direct, heat transfer variables (ht)"

Datasets
  dset1: Solution | solution = sol1

Derived values
  int1: IntLine "Line Integration 1" on boundaries 1-3, 8
    data = dset1
    table = tbl1
    expr = ht.ntflux
    unit = W/m^2
    descr = Normal total heat flux
    method = summation

Tables
  tbl1: Table
    // Line Integration 1
    Normal total heat flux (W/m^2)
    17292.1

Plots
  pg1: PlotGroup2D "Temperature (ht)" | data = dset1
    surf1: Surface | expr = T; unit = °C
    con1: Contour | expr = T; unit = °C

Exports
  data1: Data
    data = dset1
    expr = T
    unit = degC
    filename = E:\Uni ed files\Term 8\Heat Transfer 1\Project\Comsol\SSheatchimneydata.txt
  data2: Data
    data = dset1
    expr = T
    unit = degC
    exporttype = vtu
    filename = E:\Uni ed files\Term 8\Heat Transfer 1\Project\Comsol\Untitled.vtu
    sort = on